// P-T curve
New XYCurve.MyPvsT npts=4 xarray=[0 25 75 100] yarray=[1.2 1.0 0.8 0.6]

// Efficiency curve
New XYCurve.MyEff npts=4 xarray=[.1 .2 .4 1.0] yarray=[.86 .9 .93 .97]

// Irradiation shape
New Loadshape.MyIrrad npts=24 interval=1 mult=[0 0 0 0 0 0 .1 .2 .3 .5 .8 .9 1.0 1.0 .99 .9 .7 .4 .1 0 0 0 0 0]

// Temperature values
New Tshape.MyTemp npts=24 interval=1 temp=[25 25 25 25 25 25 25 25 35 40 45 50 60 60 55 40 35 30 25 25 25 25 25 25]

New PVSystem.PV phases=3 kV=.416 kVA=200 Pmpp=200 bus1=BackupBus irrad=1
~ temperature=25 P-TCurve=MyPvsT effcurve=MyEff PF=.95
~ Daily=MyIrrad TDaily=MyTemp

New VSource.PVGen phases=3 bus1=BackupBus basekV=.416

// Storage
//New Loadshape.BatteryShape npts=24 interval=1 mult=[0.1 0.8 0.3 0.4 0.5 0.6 0.7 0.8 0.9 1.0 1.0 0.9 0.8 0.7 0.6 0.5 0.4 0.3 0.7 0.1 0.8 0.3 0.4 0.5]

//New Storage.Battery phases=3 bus1=BackupBus kV=.416 kwrated=100 kwhrated=1000 pf=.95 daily=BatteryShape

New Line.BackupLine phases=3 bus1=BackupBus bus2=1
